# OpenSim document version 30000
ScaleTool subject1_scaled:
  mass: 62 [kg]
  height: -1
  age: -1
  ModelScaler:
    apply: true
    scaling_order: measurements
    marker_file: ../../../../predictivesimulations/OpenSimModel/subject1/TRC/static_overground_tr.trc
    time_range: 0.1 0.3
    preserve_mass_distribution: true
    MeasurementSet:
      Measurement Pelvis_XY: apply=true
        MarkerPair: markers=(RASI CLAV)
        MarkerPair: markers=(LASI CLAV)
        BodyScale pelvis: axes=(X Y)
        BodyScale torso: axes=(X Y)
      Measurement Pelvis_Z: apply=true
        MarkerPair: markers=(RASI LASI)
        BodyScale pelvis: axes=Z
        BodyScale torso: axes=Z
      Measurement Femur: apply=true
        MarkerPair: markers=(LASI LKNE_med)
        MarkerPair: markers=(RASI RKNE_med)
        MarkerPair: markers=(LASI LKNE)
        MarkerPair: markers=(RASI RKNE)
        BodyScale femur_r: axes=(X Y Z)
        BodyScale femur_l: axes=(X Y Z)
      Measurement Tibia: apply=true
        MarkerPair: markers=(RKNE_med RANK_med)
        MarkerPair: markers=(LKNE_med LANK_med)
        MarkerPair: markers=(LKNE LANK)
        MarkerPair: markers=(RKNE RANK)
        BodyScale tibia_r: axes=(X Y Z)
        BodyScale tibia_l: axes=(X Y Z)
      Measurement Footh: apply=true
        MarkerPair: markers=(foot_l1 foot_l7)
        MarkerPair: markers=(Foot_r1 Foot_r7)
        BodyScale talus_r: axes=(X Y Z)
        BodyScale calcn_r: axes=(X Y Z)
        BodyScale toes_r: axes=(X Y Z)
        BodyScale talus_l: axes=(X Y Z)
        BodyScale calcn_l: axes=(X Y Z)
        BodyScale toes_l: axes=(X Y Z)
  MarkerPlacer:
    apply: true
    marker_file: C:/Users/u0101727/Documents/MyRepositories/predictivesimulations_2D/OpenSimModel/subject1/Scaling/../TRC/static_overground_tr.trc
    time_range: 0.1 0.3
    max_marker_movement: -1
    IKTaskSet:
      IKMarkerTask RASI: apply=true weight=25
      IKMarkerTask LASI: apply=true weight=25
      IKMarkerTask CLAV: apply=true weight=1
      IKMarkerTask RKNE: apply=true weight=15
      IKMarkerTask RTHI2: apply=false weight=1
      IKMarkerTask RTHI3: apply=false weight=1
      IKMarkerTask RANK: apply=true weight=15
      IKMarkerTask RTIB2: apply=false weight=1
      IKMarkerTask RTIB3: apply=false weight=1
      IKMarkerTask LKNE: apply=true weight=15
      IKMarkerTask LTHI2: apply=false weight=1
      IKMarkerTask LTHI3: apply=false weight=1
      IKMarkerTask LANK: apply=true weight=15
      IKMarkerTask LTIB2: apply=false weight=1
      IKMarkerTask LTIB3: apply=false weight=1
      IKMarkerTask RPSI: apply=true weight=15
      IKMarkerTask LPSI: apply=true weight=15
      IKMarkerTask Foot_r1: apply=true weight=2
      IKMarkerTask Foot_r4: apply=false weight=1
      IKMarkerTask Foot_r6: apply=true weight=1
      IKMarkerTask foot_l1: apply=true weight=2
      IKMarkerTask foot_l4: apply=false weight=1
      IKMarkerTask foot_l6: apply=true weight=1
